# 1 Генерация полезного сигнала
i := 0, 1 .. 999
Amp := 3
ω := 2
Δt := 0.01
X[i] := Amp*sin(ω*Δt*i)
transpose(X) =  # no stored result
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# 2 Генерация зашумленного сигнала
X_N(X) :=
    Res ← 0
    for i ∈ 0 .. last(X)
        Res[i] ← X[i] + (rnd(1.5) - 0.9)
        Res[i] ← X[i] + 2*sign(rnd(1) - 0.5) if mod(i, 60) == 0
    Res
X1 := X_N(X)
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# 3 Моделирование работы исследуемых фильтров
# 3.1 Фильтр экспоненциального сглаживания
exp_fil(X, α) :=
    Res ← 0
    Res[0] ← X[0]
    for i ∈ 1 .. last(X)
        Res[i] ← α*X[i] + (1 - α)*Res[i - 1]
    Res
EF := exp_fil(X1, 0.05)
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# 3.2 Фильтр скользящего среднего
sliding_avg_filter(X, n) :=
    Res ← 0
    for i ∈ 0 .. last(X)
        Res[i] ← 1/(i + 1)*sum(X[j], j = 0 .. i) if i + 1 < n
        Res[i] ← 1/n*sum(X[i + 1 - n + j], j = 0 .. n - 1) otherwise
    Res
SAF := sliding_avg_filter(X1, 15)
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# 3.3 Медианный фильтр
median_filter(X, n) :=
    Res ← 0
    buff ← 0
    for i ∈ 0 .. last(X)
        if i + 1 < n
            for j ∈ 0 .. i
                buff[j] ← X[j]
            Res[i] ← median(buff)
        otherwise
            for j ∈ 0 .. n - 1
                buff[j] ← X[i - n + 1 + j]
            Res[i] ← median(buff)
    Res
MF := median_filter(X1, 25)
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# 3.4 Фильтр с ограничением скорости нарастания сигнала
ramp_filter(X, Δx) :=
    Res ← 0
    Res[0] ← X[0]
    buff ← X[0]
    for i ∈ 1 .. last(X)
        if |X[i] - X[i - 1]| ≤ Δx
            buff ← X[i]
            Res[i] ← X[i]
        Res[i] ← buff otherwise
    Res
RF := ramp_filter(X1, 6)
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# 3.5 Последовательное соединение двух фильтров
Y1 := ramp_filter(X1, 2)  # - убираем всплески большой амплитуды с помощью Ramp filter
Y2 := sliding_avg_filter(Y1, 25)  # - убираем высокочастотный шум с помощью фильтра скользящего среднего
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